*INCLUDE, INPUT=mat_prop.inp
*Heading
** Job name: indentation Model name: Model-1
** Generated by: Abaqus/CAE 2024
*Preprint, echo=NO, model=NO, history=NO, contact=NO
**
** PARTS
**
*Part, name=MP
*Node
      1, 0.0153900003, 0.0153900003
      2,           0., 0.0153900003
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*Element, type=CAX3
1, 251, 221, 225
2, 280, 273, 272
216, 430, 428, 419
217, 333, 367, 358
218, 461, 373, 370
219, 412, 433, 408
220, 458, 450, 448
221, 403, 462, 415
*Element, type=CAX4R
  3, 123, 275, 178, 176
  4,   8,   9, 107, 156
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*Nset, nset=whole_set, generate
   1,  463,    1
*Elset, elset=whole_set, generate
   1,  427,    1
*Nset, nset=set_right
 1,
*Nset, nset=set_left
  2,  3,  4, 19, 20, 21
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*Elset, elset=set_left
   9,  10,  12,  13,  16,  29
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*Elset, elset=_surf_ext_S4, internal
  18,  20,  23,  25,  26,  34
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*Elset, elset=_surf_ext_S2, internal
  28,  37,  41,  43,  62,  63
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*Elset, elset=_surf_ext_S3, internal
  50, 255
*Surface, type=ELEMENT, name=surf_ext
_surf_ext_S4, S4
_surf_ext_S2, S2
_surf_ext_S3, S3
** Section: solid
*Solid Section, elset=whole_set, material=hyperelastic
,
*End Part
**
*Part, name=substrate
*Node
      1,           0.,           0.
      2, 0.000992903253,           0.
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*Element, type=RAX2
 1,  1,  2
 2,  2,  3
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*Node
     33,           0.,           0.,           0.
*Nset, nset=substrate-RefPt_, internal
33,
*Nset, nset=whole_set, generate
  1,  32,   1
*Elset, elset=whole_set, generate
  1,  31,   1
*Nset, nset=rpset
 33,
*Elset, elset=_surf_ext_SPOS, internal, generate
  1,  31,   1
*Surface, type=ELEMENT, name=surf_ext
_surf_ext_SPOS, SPOS
*End Part
**
*Part, name=tip
*Node
      1,           0.,  0.055780001
      2, 0.00100583211, 0.0557394661
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*Element, type=RAX2
 1,  1,  2
 2,  2,  3
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*Node
     41,           0., 0.0432800017,           0.
*Nset, nset=tip-RefPt_, internal
41,
*Nset, nset=whole_set, generate
  1,  40,   1
*Elset, elset=whole_set, generate
  1,  39,   1
*Nset, nset=rpset
 41,
*Elset, elset=_surf_ext_SPOS, internal, generate
  1,  39,   1
*Surface, type=ELEMENT, name=surf_ext
_surf_ext_SPOS, SPOS
*End Part
**
**
** ASSEMBLY
**
*Assembly, name=Assembly
**
*Instance, name=tip-1, part=tip
*End Instance
**
*Instance, name=MP-1, part=MP
*End Instance
**
*Instance, name=substrate-1, part=substrate
*End Instance
**
** Constraint: rigid_substrate
*Rigid Body, ref node=substrate-1.rpset, elset=substrate-1.whole_set
** Constraint: rigid_tip
*Rigid Body, ref node=tip-1.rpset, elset=tip-1.whole_set
*End Assembly
*Amplitude, name=Amp-1
             0.,              0.,              1.,              1.
**
** INTERACTION PROPERTIES
**
*Surface Interaction, name=frictionless
1.,
*Friction
0.,
*Surface Behavior, pressure-overclosure=HARD
**
** INTERACTIONS
**
** Interaction: MP_substrate
*Contact Pair, interaction=frictionless, type=SURFACE TO SURFACE
MP-1.surf_ext, substrate-1.surf_ext
** Interaction: tip_MP
*Contact Pair, interaction=frictionless, type=SURFACE TO SURFACE
MP-1.surf_ext, tip-1.surf_ext
** ----------------------------------------------------------------
**
** STEP: indentation
**
*Step, name=indentation, nlgeom=YES, inc=1000000
*Static
0.01, 1., 1e-07, 0.02
**
** BOUNDARY CONDITIONS
**
** Name: MP Type: Displacement/Rotation
*Boundary
MP-1.set_left, 1, 1
** Name: substrate Type: Displacement/Rotation
*Boundary
substrate-1.rpset, 1, 1
substrate-1.rpset, 2, 2
substrate-1.rpset, 6, 6
** Name: tip Type: Displacement/Rotation
*Boundary, amplitude=Amp-1
tip-1.rpset, 1, 1
tip-1.rpset, 2, 2, -0.0125
tip-1.rpset, 6, 6
**
** OUTPUT REQUESTS
**
*Restart, write, frequency=0
**
** FIELD OUTPUT: F-Output-1
**
*Output, field, variable=PRESELECT
**
** HISTORY OUTPUT: H-Output-2
**
*Output, history
*Node Output, nset=substrate-1.rpset
RF2,
**
** HISTORY OUTPUT: H-Output-1
**
*Node Output, nset=tip-1.rpset
U2,
**
** HISTORY OUTPUT: H-Output-3
**
*Node Output, nset=MP-1.set_right
U1,
*End Step
